// SBML level 3 version 1

model mp41()
  // model units - substance: substance, time: second, extent: substance

  // Compartments:
  compartment Compartment_462_0_ = 1e-12 volume;

  // Species:
  substanceOnly species G2K_464_0_ in Compartment_462_0_ = 6.022142e8;
  substanceOnly species PG2_465_0_ in Compartment_462_0_ = 6.022142e8;
  substanceOnly species A_dot_A_466_0_ in Compartment_462_0_ = 6.022142e8;
  substanceOnly species Wee1_467_0_ in Compartment_462_0_ = 6.022142e8;
  substanceOnly species Cdc25_468_0_ in Compartment_462_0_ = 6.022142e8;
  substanceOnly species Wee1_star__469_0_ in Compartment_462_0_ = 0;
  substanceOnly species EWback_470_0_ in Compartment_462_0_ = 6.022142e8;
  substanceOnly species Cdc25_star__471_0_ in Compartment_462_0_ = 0;
  substanceOnly species E25back_472_0_ in Compartment_462_0_ = 6.022142e8;
  substanceOnly species G2K_dash_R_473_0_ in Compartment_462_0_ = 6.022142e8;
  substanceOnly species R_474_0_ in Compartment_462_0_ = 6.022142e8;
  substanceOnly species ube_475_0_ in Compartment_462_0_ = 6.022142e8;
  substanceOnly species c13degraded_476_0_ in Compartment_462_0_ = 0;
  substanceOnly species c2_477_0_ in Compartment_462_0_ = 0;
  substanceOnly species Rdegraded_478_0_ in Compartment_462_0_ = 0;
  substanceOnly species IE_star__479_0_ in Compartment_462_0_ = 0;
  substanceOnly species IE_480_0_ in Compartment_462_0_ = 6.022142e8;
  substanceOnly species UBE_star__481_0_ in Compartment_462_0_ = 0;
  substanceOnly species EIback_482_0_ in Compartment_462_0_ = 6.022142e8;
  substanceOnly species EUback_483_0_ in Compartment_462_0_ = 6.022142e8;
  substanceOnly species PG2R_484_0_ in Compartment_462_0_ = 6.022142e8;
  substanceOnly species AA2_485_0_ in Compartment_462_0_ = 6.022142e8;
  substanceOnly species G1K_486_0_ in Compartment_462_0_ = 6.022142e8;
  substanceOnly species AA3_487_0_ in Compartment_462_0_ = 6.022142e8;
  substanceOnly species G1KR_488_0_ in Compartment_462_0_ = 6.022142e8;
  substanceOnly species Cg2degraded_489_0_ in Compartment_462_0_ = 0;
  substanceOnly species UbE2_490_0_ in Compartment_462_0_ = 6.022142e8;
  substanceOnly species UbE2_star__491_0_ in Compartment_462_0_ = 0;
  substanceOnly species EU2back_492_0_ in Compartment_462_0_ = 6.022142e8;
  substanceOnly species $MPF_S_493_0_ in Compartment_462_0_;
  substanceOnly species $SPF_494_0_ in Compartment_462_0_;
  substanceOnly species $MPF_495_0_ in Compartment_462_0_;
  substanceOnly species $MPFHASH_496_0_ in Compartment_462_0_;

  // Assignment rules:
  MPF_S_493_0_ := G2K_464_0_ + PG2_465_0_;
  SPF_494_0_ := MPF_S_493_0_ + G1K_486_0_ + MPF_495_0_ + MPFHASH_496_0_;
  MPF_495_0_ := G2K_464_0_ + PG2_465_0_;
  MPFHASH_496_0_ := PG2_465_0_ + G2K_464_0_;

  // Reactions:
  k1_505_0_: A_dot_A_466_0_ => G2K_464_0_; k1_505_0__Kf*A_dot_A_466_0_;
    k1_505_0__Kf = 0.015 per_second;
  kwee_506_0_: G2K_464_0_ + Wee1_467_0_ => PG2_465_0_; kwee_506_0__Kf*G2K_464_0_*Wee1_467_0_;
    kwee_506_0__Kf = 5.811886e-10 per_item_per_second;
  k25_507_0_: PG2_465_0_ + Cdc25_468_0_ => G2K_464_0_; k25_507_0__Kf*PG2_465_0_*Cdc25_468_0_;
    k25_507_0__Kf = 8.302694e-10 per_item_per_second;
  k2_508_0_: G2K_464_0_ + ube_475_0_ => c13degraded_476_0_ + c2_477_0_; k2_508_0__Kf*G2K_464_0_*ube_475_0_;
    k2_508_0__Kf = 4.151347e-10 per_item_per_second;
  y_509_0_: AA2_485_0_ => R_474_0_; y_509_0__Kf*AA2_485_0_;
    y_509_0__Kf = 0.09375 per_second;
  h_510_0_: G2K_464_0_ + R_474_0_ -> G2K_dash_R_473_0_; h_510_0__Kf*G2K_464_0_*R_474_0_ - h_510_0__Kb*G2K_dash_R_473_0_;
    h_510_0__Kf = 1.660539e-7 per_item_per_second; h_510_0__Kb = 0.1 per_second;
  q_511_0_: R_474_0_ => Rdegraded_478_0_; q_511_0__Kf*R_474_0_;
    q_511_0__Kf = 0.1875 per_second;
  z_512_0_: AA3_487_0_ -> G1K_486_0_; z_512_0__Kf*AA3_487_0_ - z_512_0__Kb*G1K_486_0_;
    z_512_0__Kf = 0.00175 per_second; z_512_0__Kb = 0.2 per_second;
  x_513_0_: PG2_465_0_ + R_474_0_ -> PG2R_484_0_; x_513_0__Kf*PG2_465_0_*R_474_0_ - x_513_0__Kb*PG2R_484_0_;
    x_513_0__Kf = 1.660539e-7 per_item_per_second; x_513_0__Kb = 0.1 per_second;
  o_514_0_: PG2R_484_0_ -> PG2_465_0_ + Rdegraded_478_0_; o_514_0__Kf*PG2R_484_0_ - o_514_0__Kb*PG2_465_0_*Rdegraded_478_0_;
    o_514_0__Kf = 0.1875 per_second; o_514_0__Kb = 3.321078e-10 per_item_per_second;
  c_515_0_: R_474_0_ + G1K_486_0_ -> G1KR_488_0_; c_515_0__Kf*R_474_0_*G1K_486_0_ - c_515_0__Kb*G1KR_488_0_;
    c_515_0__Kf = 1.660539e-10 per_item_per_second; c_515_0__Kb = 0.2 per_second;
  w_516_0_: G1KR_488_0_ => R_474_0_ + c2_477_0_ + Cg2degraded_489_0_; w_516_0__Kf*G1KR_488_0_;
    w_516_0__Kf = 0 per_second;
  v_517_0_: G1KR_488_0_ -> Rdegraded_478_0_ + G1K_486_0_; v_517_0__Kf*G1KR_488_0_ - v_517_0__Kb*Rdegraded_478_0_*G1K_486_0_;
    v_517_0__Kf = 0.1875 per_second; v_517_0__Kb = 3.321078e-10 per_item_per_second;
  f_518_0_: G2K_dash_R_473_0_ => G2K_464_0_ + Rdegraded_478_0_; f_518_0__Kf*G2K_dash_R_473_0_;
    f_518_0__Kf = 0.1875 per_second;
  p_519_0_: G2K_dash_R_473_0_ -> R_474_0_ + c13degraded_476_0_ + c2_477_0_; p_519_0__Kf*G2K_dash_R_473_0_ - p_519_0__Kb*R_474_0_*c13degraded_476_0_*c2_477_0_;
    p_519_0__Kf = 0.05 per_second; p_519_0__Kb = 6.893473e-19 per_item_sq_per_second;
  l_520_0_: PG2R_484_0_ -> R_474_0_ + c13degraded_476_0_ + c2_477_0_; l_520_0__Kf*PG2R_484_0_ - l_520_0__Kb*R_474_0_*c13degraded_476_0_*c2_477_0_;
    l_520_0__Kf = 0.05 per_second; l_520_0__Kb = 6.893473e-19 per_item_sq_per_second;
  K_521_0_: G1K_486_0_ + UbE2_490_0_ => c2_477_0_ + Cg2degraded_489_0_; K_521_0__Kf*G1K_486_0_*UbE2_490_0_;
    K_521_0__Kf = 1.245404e-8 per_item_per_second;
  // kcat*Wee1_star__469_0_*EWback_470_0_/(Km +Wee1_star__469_0_)
  MMenz1_522_0_: Wee1_star__469_0_ => Wee1_467_0_; MMenz1_522_0__kcat*Wee1_star__469_0_*EWback_470_0_/(MMenz1_522_0__Km + Wee1_star__469_0_);  // modifiers: EWback_470_0_
    MMenz1_522_0__Km = 6.022142e7 substance; MMenz1_522_0__kcat = 0.25 per_second;
  // kcat*Cdc25_468_0_*E25back_472_0_/(Km +Cdc25_468_0_)
  MMenz2_523_0_: Cdc25_468_0_ => Cdc25_star__471_0_; MMenz2_523_0__kcat*Cdc25_468_0_*E25back_472_0_/(MMenz2_523_0__Km + Cdc25_468_0_);  // modifiers: E25back_472_0_
    MMenz2_523_0__Km = 6.022142e7 substance; MMenz2_523_0__kcat = 0.25 per_second;
  // kcat*UBE_star__481_0_*IE_480_0_/(Km +UBE_star__481_0_)
  MMenz_524_0_: UBE_star__481_0_ => ube_475_0_; MMenz_524_0__kcat*UBE_star__481_0_*IE_480_0_/(MMenz_524_0__Km + UBE_star__481_0_);  // modifiers: IE_480_0_
    MMenz_524_0__Km = 6022142 substance; MMenz_524_0__kcat = 0.4 per_second;
  // kcat*IE_480_0_*EIback_482_0_/(Km +IE_480_0_)
  MMenz1_525_0_: IE_480_0_ => IE_star__479_0_; MMenz1_525_0__kcat*IE_480_0_*EIback_482_0_/(MMenz1_525_0__Km + IE_480_0_);  // modifiers: EIback_482_0_
    MMenz1_525_0__Km = 6022142 substance; MMenz1_525_0__kcat = 0.1 per_second;
  // kcat*ube_475_0_*EUback_483_0_/(Km +ube_475_0_)
  MMenz2_526_0_: ube_475_0_ => UBE_star__481_0_; MMenz2_526_0__kcat*ube_475_0_*EUback_483_0_/(MMenz2_526_0__Km + ube_475_0_);  // modifiers: EUback_483_0_
    MMenz2_526_0__Km = 6022142 substance; MMenz2_526_0__kcat = 0.1 per_second;
  // kcat*UbE2_490_0_*EU2back_492_0_/(Km +UbE2_490_0_)
  MMenz1_527_0_: UbE2_490_0_ => UbE2_star__491_0_; MMenz1_527_0__kcat*UbE2_490_0_*EU2back_492_0_/(MMenz1_527_0__Km + UbE2_490_0_);  // modifiers: EU2back_492_0_
    MMenz1_527_0__Km = 3011071 substance; MMenz1_527_0__kcat = 0.1 per_second;
  // kcat*UbE2_star__491_0_*MPF_S_493_0_/(Km +UbE2_star__491_0_)
  MMenz_528_0_: UbE2_star__491_0_ => UbE2_490_0_; MMenz_528_0__kcat*UbE2_star__491_0_*MPF_S_493_0_/(MMenz_528_0__Km + UbE2_star__491_0_);  // modifiers: MPF_S_493_0_
    MMenz_528_0__Km = 3.011071e7 substance; MMenz_528_0__kcat = 1 per_second;
  // kcat*R_474_0_*SPF_494_0_/(Km +R_474_0_)
  MMenz_529_0_: R_474_0_ => Rdegraded_478_0_; MMenz_529_0__kcat*R_474_0_*SPF_494_0_/(MMenz_529_0__Km + R_474_0_);  // modifiers: SPF_494_0_
    MMenz_529_0__Km = 602214.2 substance; MMenz_529_0__kcat = 0.0321 per_second;
  // kcat*Wee1_467_0_*Cdc25_star__471_0_*MPF_495_0_/(Km +Wee1_467_0_*Cdc25_star__471_0_)
  MMenz_530_0_: Wee1_467_0_ + Cdc25_star__471_0_ => Cdc25_468_0_ + Wee1_star__469_0_; MMenz_530_0__kcat*Wee1_467_0_*Cdc25_star__471_0_*MPF_495_0_/(MMenz_530_0__Km + Wee1_467_0_*Cdc25_star__471_0_);  // modifiers: MPF_495_0_
    MMenz_530_0__Km = 3.626619e16 substance; MMenz_530_0__kcat = 1 per_second;
  // kcat*IE_star__479_0_*MPFHASH_496_0_/(Km +IE_star__479_0_)
  MMenz_531_0_: IE_star__479_0_ => IE_480_0_; MMenz_531_0__kcat*IE_star__479_0_*MPFHASH_496_0_/(MMenz_531_0__Km + IE_star__479_0_);  // modifiers: MPFHASH_496_0_
    MMenz_531_0__Km = 6022142 substance; MMenz_531_0__kcat = 0.4 per_second;

  // Unit definitions:
  unit volume = litre;
  unit substance = item;
  unit per_second = 1 / second;
  unit per_item_per_second = 1 / (item * second);
  unit per_item_sq_per_second = 1 / (item^2 * second);
end
